# AguaClara Design Tool
# [reference: BasicClientInputs.xmcd]
Ti_wanted := 5 min
# [reference: ExpertClientInputs.xmcd]
# [reference: DesignAssumptions.xmcd]
# [reference: MathFunctions.xmcd]
# [reference: PipeDatabase.xmcd]
# [reference: MinorLossCoefficients.xmcd]
# [reference: FluidsFunctions.xmcd]
# [reference: Sedimentation Tank.xmcd]
# [reference: Floc Hopper - New Design.xmcd]
# [reference: FCM.xmcd]
# [reference: Flocculator 3.xmcd]
# [reference: RapidMixer.xmcd]
# [reference: EntranceTankDim.xmcd]
HW_FlocEnd = 1.61805 m
# [reference: Materials List.xmcd]
# [reference: AutoCADMasterProgram.xmcd]
# This file must have at least one variable displayed otherwise it doesn't recalculate and it claims that all variables are undefined.
Q_Plant = 0.05 m^3/s
H_SedFrameWall = 0
EN_DrillSeries = 0
EN_PipeSpec = 8
L_Sed = 20.8333 m
EN_FcmTube = 0
AC_SedTank = [
    "_-view o t"; "-layer m tank"; "c t 132,132,132"; "tank"; "  "; "_-view o t _zoom w 0.16,-0.16,0 -20.99333,1.16,1.71805 _box 0,0,0 -20.83333,1,1.71805 _box 0.15,-0.15,-0.15 -20.98333,1.15,1.71805 _subtract 0.15,-0.15,-0.15  0,0,0 "; "-layer s 0"; "  "; "-layer f tank"; "  "
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]
AC_FlocTank = [
    "-layer m floctank";
    "c t 91,91,91";
    "floctank";
    "  ";
    "_-view o t _zoom w 0.16,3.29,0 -20.99333,5.99576,1.91138 _box 0,3.45,0 -20.83333,5.83576,1.91138 _box 0.15,3.3,-0.15 -20.98333,5.98576,1.91138 _subtract 0.15,3.3,-0.15  0,3.45,0 ";
    "_box -20.98333,4.56788,0 0.15,4.71788,1.91138";
    "_box -0.46183,4.56788,1.16629 0,4.71788,0";
    "_subtract -20.98333,4.56788,0  -0.46183,4.56788,1.16629 ";
    "_union all ";
    "-layer s 0"
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]
# [component: inputs AC_FlocTank]
