# AguaClara Water Treatment Plants
# Design References
# MathCAD dimension calculations:
# Variable Naming Guide
# The list below is the list names that can be used before the period for the subscript in our variable names.
# Major Plant Components. These items follow the period in the variable name
# [reference: BasicInputs.xmcd]
Q_Plant := 32*L/s
# [reference: ExpertInputs.xmcd]
# [reference: MathFunctions.xmcd]
# [reference: PipeDatabase.xmcd]
# [reference: FluidsFunctions.xmcd]
# [reference: SedimentationTank.xmcd]
# [reference: Flocculator.xmcd]
# [reference: LFOM.xmcd]
[
    "Subscripts", "";
    "component key", "Description";
    "Et", "Entrance tank";
    "Lfom", "Linear flow orifice meter";
    "Rm", "Rapid mix";
    "Floc", "Flocculation tank";
    "Sed", "Sedimentation tank";
    "Fi", "Stacked Rapid Sand Filter"
]
# [reference: LinearCdc.xmcd]
# [reference: ChemStorageTanks.xmcd]
# [reference: EntranceTank.xmcd]
# [reference: StackedRapidSandFilter.xmcd]
# [reference: DrainChannel.xmcd]
# [reference: MaterialsList.xmcd]
# AutoCAD drawing programs:
# Translators:
# These are the codes that take MathCAD outputs and create AutoCAD scripts that are used to draw the plant (formerly Basics)
# [reference: MtoATranslators.xmcd]
# The wrapped MtoA translator contains the functions that the user will want to access. These functions will draw pieces with full functionality - specifying the location, dimension, and orientation of the object. Also, it contains layer control and subtraction capabilities for grouped objects.
# [reference: MtoATranslatorsWrapped.xmcd]
# Plant Elements:
# These are all of the files that draw the fundamental parts of the plants (tees, elbows, tanks, pipes, etc)
[
    "Symbol", "Description", "Dimensions";
    "Amp", "amplitude", "L";
    "B", "perpendicular distance between components (center to center)", "L";
    "D", "Diameter", "L";
    "E", "pipe roughness", "L";
    "FB", "Freeboard", "L";
    "H", "height (includes freeboard)", "L";
    "HL", "head loss", "L";
    "HW", "local water depth", "L";
    "ID", "inner diameter", "L";
    "L", "length", "L";
    "Loc", "Locations", "L";
    "ND", "nominal diameter", "L";
    "OD", "outer diameter", "L";
    "R", "Radius", "L";
    "S", "space between components", "L";
    "T", "thickness", "L";
    "W", "width", "L";
    "Z", "elevation relative to bottom of sed tank", "L";
    "ZW", "water depth relative to bottom of sed tank", "L";
    "V", "velocity", "L/T";
    "CP", "Collision Potential", "L^(2/3)";
    "A", "Area", "L^2";
    "Nu", "kinematic viscosity", "L^2/T";
    "ED", "energy dissipation rate", "L^2/T^3";
    "Vol", "volume", "L^3";
    "Q", "flow", "L^3/T";
    "MW", "Molecular weight", "M";
    "C", "Concentration", "M/L^3";
    "Rho", "Density", "M/L^3";
    "AN", "angle", "radians";
    "Ti", "time", "T";
    "EN", "Enumerated type", "dimensionless";
    "N", "Number", "dimensionless";
    "Pi", "dimensionless geometric ratio", "";
    "AC", "AutoCAD command string", "";
    "K", "minor loss coefficient", ""
]
# [reference: ChannelF.xmcd]
# [reference: PlumbingF.xmcd]
# [reference: TankF.xmcd]
# [reference: StairsF.xmcd]
# [reference: DrainChannelF.xmcd]
# Specific Pieces:
# These are the codes that draw the bigger pieces of the plant (the sed tank, floc tank, etc)
# [reference: FlocculatorAC.xmcd]
# [reference: SedimentationTankAC.xmcd]
# [reference: EntranceTankAC.xmcd]
# [reference: ChemStockTanksACvlk24.xmcd]
# [reference: DrainChannelAC.xmcd]
# [reference: StackedRapidSandFilterAC.xmcd]
# [reference: OperatorAccessACvlk24.xmcd]
# [reference: CdcACvlk24.xmcd]
# AutoCAD Materials:
# Adds the option of assigning materials to the entire plant design.
# [reference: MaterialsAC.xmcd]
# This rearranges the plant to optimize the layout
# [reference: PlantLayoutsAC.xmcd]
# This file will execute at the very end to create multiple views of the entire plant in paperspace
# Layouts:
# [reference: LayoutsAC.xmcd]
# Sedimentation
# Sed Tanks and Slopes:
N_SedTanks = 3
L_Sed = 6.47087 m
N_SedBays = 2  # Number of bays of inlet manifolds in each sed tank
# Length of the port through which water exits the inlet manifold
# Width of ferrous cement plates in whice one manifold port is cut
Q_SedBay = 5.33333 L/s
# Sedimentation Tank Sludge Drain:
N_SedSludgeOrifices = 48  # per cell
Ti_SludgeDrain = 30 min  # Tank Drain time
W_SedSludge = 9.21634 cm  # Width of the sludge channel
B_SedSludgeOrifices = 11.0455 cm  # Distance center to center between drain orifices
# Depth of the sludge channel
H_SedSludge = 9.21634 cm
W_SedDrainCover = 13.2163 cm
D_SedSludgeOrifice = 0.00926059 m  # Diameter of drain orifices
N_SedSludgeOrifices = 48
# Sedimentation Tank Dimensions:
Z_SedSludge = 0.0921634 m  # Height from 0 of the top of the sludge drain
# Height from 0 of the top of the inlet manifold
W_Sed = 2 m
L_Sed = 6.47087 m  # Total tank length
# Inlet Channel:
HW_SedInletChannel = 0.38815 m  # Width of the drop chimneys connecting channel to sed inlet manifolds
W_SedInletChannel = 0.578538 m  # length of drop chimmneys
L_SedChannel = 6.3 m
H_SedInletChannel = 0.48815 m
# Sedimentation Tank Effluent Launder:
N_SedLaunderOrifices = 102  # Number of orifices per launder  # More Launder Dimensions
ND_SedLaunder = 6 in
Q_SedLaunderOrifices = 5.22876e-5 m^3/s
# Center to center launder spacing
L_SedLaunder = 5.33715 m
B_SedLaunderOrifices = 0.1 m
D_SedLaunderOrifice = 0.433071 in
# Exit Channel:
W_SedExitChannel = 0.3485 m
H_SedExitChannel = 0.48815 m
HW_SedExitChannel = 0.34815 m  # water height in exit channel from 0
# Lamella:
L_SedPlate = 0.6 m  # center to center distance between lamella
B_SedPlate = 2.7 cm  # spacing between lamella
S_SedPlate = 2.5 cm
N_SedPlates = 168  # Number of Sed Plates per Sedimentation Tank Bay.
AN_SedPlate = 60 deg
V_SedC =  # error: This variable is undefined.
L_SedActive = 5.23541 m
V_SedUp = 86.0691 m/day
Z_SedLaunder = 1.83734 m
N_SedPlates = 168
HW_Sed = 1.96037 m
H_Sed = 2.0813 m
# Flocculator
# Look at Flocculator Positioning arrays
W_FlocChannel = 0.6 m
# Fill last channel with bafffles from last channel
ED_Floc = 10 mW/kg
# Fix port width to be based on energy dissipation in that channel
# Adjust spacing after the number of baffles per channel is known.
HW_FlocEnd = 1.96037 m
# Check the residence time of the flocculator should be at least 20minutes
X_FlocBaffles = [
    0.310403, 0.310403, 0.310403, 0.310403;
    0.602807, 0.602807, 0.602807, 0.602807;
    0.89521, 0.89521, 0.89521, 0.89521;
    1.18761, 1.18761, 1.18761, 1.18761;
    1.48002, 1.48002, 1.48002, 1.48002;
    1.77242, 1.77242, 1.77242, 1.77242;
    2.06482, 2.06482, 2.06482, 2.06482;
    2.35723, 2.35723, 2.35723, 2.35723;
    2.64963, 2.64963, 2.64963, 2.64963;
    2.94203, 2.94203, 2.94203, 2.94203;
    3.23444, 3.23444, 3.23444, 3.23444;
    3.52684, 3.52684, 3.52684, 3.52684;
    3.81924, 3.81924, 3.81924, 3.81924;
    4.11165, 4.11165, 4.11165, 4.11165;
    4.40405, 4.40405, 4.40405, 4.40405;
    4.69645, 4.69645, 4.69645, 4.69645;
    4.98886, 4.98886, 4.98886, 4.98886;
    5.28126, 5.28126, 5.28126, 5.28126;
    5.57366, 5.57366, 5.57366, 5.57366;
    0, 0, 0, 5.86607
] m
L_FlocBaffles = [
    1.52476, 1.52476, 1.52476, 1.85335;
    1.85335, 1.85335, 1.85335, 1.52476;
    1.52476, 1.52476, 1.52476, 1.85335;
    1.85335, 1.85335, 1.85335, 1.52476;
    1.52476, 1.52476, 1.52476, 1.85335;
    1.85335, 1.85335, 1.85335, 1.52476;
    1.52476, 1.52476, 1.52476, 1.85335;
    1.85335, 1.85335, 1.85335, 1.52476;
    1.52476, 1.52476, 1.52476, 1.85335;
    1.85335, 1.85335, 1.85335, 1.52476;
    1.52476, 1.52476, 1.52476, 1.85335;
    1.85335, 1.85335, 1.85335, 1.52476;
    1.52476, 1.52476, 1.52476, 1.85335;
    1.85335, 1.85335, 1.85335, 1.52476;
    1.52476, 1.52476, 1.52476, 1.85335;
    1.85335, 1.85335, 1.85335, 1.52476;
    1.52476, 1.52476, 1.52476, 1.85335;
    1.85335, 1.85335, 1.85335, 1.52476;
    1.52476, 1.52476, 1.52476, 1.85335;
    0, 0, 0, 1.52476
] m
Z_FlocBaffles = [
    0, 0, 0, 0.435605;
    0.435605, 0.435605, 0.435605, 0;
    0, 0, 0, 0.435605;
    0.435605, 0.435605, 0.435605, 0;
    0, 0, 0, 0.435605;
    0.435605, 0.435605, 0.435605, 0;
    0, 0, 0, 0.435605;
    0.435605, 0.435605, 0.435605, 0;
    0, 0, 0, 0.435605;
    0.435605, 0.435605, 0.435605, 0;
    0, 0, 0, 0.435605;
    0.435605, 0.435605, 0.435605, 0;
    0, 0, 0, 0.435605;
    0.435605, 0.435605, 0.435605, 0;
    0, 0, 0, 0.435605;
    0.435605, 0.435605, 0.435605, 0;
    0, 0, 0, 0.435605;
    0.435605, 0.435605, 0.435605, 0;
    0, 0, 0, 0.435605;
    0, 0, 0, 0
] m
N_FlocChannels = 4
L_FlocTank = 25.8835 m
HL_Floc = 27.8585 cm
HW_FlocStart = 2.23895 m
S_FlocBaffle = [29.0403; 29.0403; 29.0403; 29.0403] cm
B_FlocBaffle = [29.2403; 29.2403; 29.2403; 29.2403] cm
N_FlocChannelBaffles = [19; 19; 19; 20]
W_FlocPort = [0.290403; 0.290403; 0.290403; 0.290403] m
HL_FlocChannels = [6.87865; 6.87865; 6.87865; 7.22259] cm
L_FlocBaffleLower = 1.52476 m
L_FlocBaffleUpper = 1.85335 m
H_FlocPort = [0.6; 0.6; 0.6; 0.6] m
Ti_Floc = 15.8566 min  # residence time of the flocculator
N_FlocBaffles = 77
# Materials List
N_Valves = 6
N_ValveCouplings = 6
N_SedPlatesTotal = 1008
N_SedPlatesPerSheet = 5
N_SedPlateSheets = 202
# AutoCAD Scripts
AC_SedTank =  # no stored result
AC_EntranceTank =  # no stored result
AC_FlocTank = [
    "-layer m FlocTankCon"; "c t 132,132,132"; "FlocTankCon"; "  "; "_-view o t _zoom w 0.16,6.29,0 -6.63087,9.46,2.33895 _box 0,6.45,0 -6.47087,9.3,2.33895 _box 0.15,6.3,-0.15 -6.62087,9.45,2.33895 _subtract 0.15,6.3,-0.15  0,6.45,0 "; "_box -6.62087,7.05,0 0.15,7.2,2.33895"; "-array l  R 3 1 0.75"; "-group c FlocTankCon y "; "all "; "-layer s 0"
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]
AC_ChemTanks =  # no stored result
AC_OperatorAccess = [
    "-layer m OpWalkwayCon"; "c t 132,132,132"; "OpWalkwayCon"; "  "; "_-view o f"; "_pline"; "-10.35552,3.00454"; "-10.05552,3.00454"; "-10.05552,2.80311"; "-9.75552,2.80311"
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]
AC_DrainChannel = [
    "-layer m DC"; "c t 132,132,132"; "DC"; "  "; "3dpoly"; "0.15,10.95,1.44651"; "0.15,10.95,1.06669"; "0.15,11.70965,1.06669"; "0.15,11.70965,1.44651"; "0.15,10.95,1.44651 "
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]
AC_Layout = [
    "laythw"; "-layout t AguaClara 0"; "View"; "layout d Layout1"; " d Layout2"; "layout r View"; "TopView"; "layout s TopView"; ".ms"; "z o all "
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]
AC_MatApply = ["-insert MaterialsInsert"; "0,0,0 x 1 1  0"]
AC_Filter =  # no stored result
AC_Cdc = [
    "-layer m Cdc"; "c t 125,0,160"; "Cdc"; "  "; "-insert CdcLeverArmwithReducer.dwg"; "-6.20022,11.24208,2.71674 x 1 1  270"; "-insert CdcLeverArmBracket.dwg"; "-6.61297,11.21008,2.69184 x 1 1  270"; "-insert CdcCht.dwg"; "-7.54632,11.24208,2.80954 x 1 1  90"
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]
